<?xml version="1.0"?>
<Node>
    <Node name="splitMesh">
        <VisualStyle displayFlags="showWireframe" />
        <MeshObjLoader name="loader" filename="splitMesh.obj" />
        <Vertex2Frame name="frames" template="Rigid" position="@loader.position" normals="@loader.normals" />
        <TriangleSetTopologyContainer name="topology" src="@loader" />
        <MechanicalObject template="Rigid" position="@frames.frames" />
		<OglModel name="visual" color="0.75 0 0" />
		<IdentityMapping input="@." output="@visual" />
    </Node>

    <Node name="joinedMesh">
        <MeshObjLoader name="loader" filename="joinedMesh.obj"/>
        <Vertex2Frame name="frames" template="Rigid" position="@loader.position" normals="@loader.normals" />
        <MechanicalObject name="mechanicalObject" template="Rigid" position="@frames.frames" />
    </Node>

	<Node name="simulation">
        <EulerImplicit />
        <CGLinearSolver iterations="200" tolerance="1e-9" threshold="1e-9" />
        <TriangleSetTopologyContainer src="@/joinedMesh/loader" />
        <MechanicalObject template="Rigid" position="@/joinedMesh/frames.frames" />
		<UniformMass showAxisSizeFactor="0.1" totalMass="1" />
        <TriangularBendingFEMForceField
			bending="true"
			convergenceRatio="0.01"
			edge2="102 251 216 217 228 143 141 218 215 245 246 88 86 114 116 52 41 115 87 76"
			edge1="278 256 268 267 264 272 273 265 271 263 257 281 288 277 274 290 291 275 285 289"
			edgeCombined="109 267 226 227 239 151 149 229 223 256 262 93 86 121 124 52 41 123 89 76"
			joinEdges="true"
			nodeMap="0 1 2 3 4 5 6 7 8 9 10 11 12 13 14 15 16 17 18 19 20 21 22 23 24 25 26 27 28 29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"
			originalTopology="@/splitMesh/topology"
			poissonRatio="0.5"
			thickness="0.1"
			youngModulus="10000" />
        <!--
			originalNodes="@/splitMesh/frames.frames"
			originalTriangles="@/splitMesh/topology.triangles"
            -->
		<FixedConstraint indices="5-20 164-179" />
		<OglModel name="visual" color="1 0.5 0.5" />
		<IdentityMapping input="@." output="@visual" />
	</Node>
</Node>
