<?xml version="1.0"?>
<Node name="root" dt="0.01" gravity="0 0 0">

    <VisualStyle displayFlags="showBehaviorModels showForceFields showVisualModels" />

    <Node name="triangles">
        <EulerImplicitSolver rayleighMass="0.0" rayleighStiffness="0.5"/>
        <CGLinearSolver iterations="200" tolerance="1e-15" threshold="1e-15"/>
        <!--
        <CGLinearSolver template="FullMatrix" iterations="200" tolerance="1e-15" threshold="1e-15"/>
        <SparseLUSolver />
        <SparseLDLSolver />
        -->
		<noLULinearSolver printLog="true" verbose="true" />

        <!-- sqrt(1 - 0.5^2) = 0.8660254037844386 -->
        <TriangleSetTopologyContainer name="tri"
            position="
            0 0 0  1 0 0  0.5 0.8660254037844386 0
            0 0 1  1 0 1  0.5 0.8660254037844386 1
            0 0 2  1 0 2  0.5 0.8660254037844386 2
            "
            triangles="
            0 1 2
            4 5 3
            8 6 7
            " />
        <MechanicalObject name="triMO" template="Rigid" />
        <noUniformMass showAxisSizeFactor="0.2" totalmass="0.1" />


        <Node name="bezierNodes">
            <PointSetTopologyContainer template="Vec3d" name="BezierPoints" />
            <Mesh2PointTopologicalMapping input="@../tri" output="@BezierPoints"
                pointBaryCoords="0 0 0" edgeBaryCoords="0.333 0.6666 0    0.6666 0.3333 0"  triangleBaryCoords="0.3333 0.3333 0" />
            <BezierShellInterpolation template="Rigid" name="bsInterp" />

        </Node>
        <!--
        -->

        <Node name="FF">

            <FixedRotationConstraint FixedZRotation="true"/>

            <FixedConstraint indices="0 1 3 4 6 7"/>
            <ConstantForceField points="2 5 8" forces="0 1000 0 0 0 0"/>

            <!--
                -->
            <BezierShellForceField
                youngModulus="1.092e6" poissonRatio="0.33" thickness="0.01"
                polarMaxIters="20" polarMinTheta="1e-6"
                bsInterpolation="@../bezierNodes/bsInterp" printLog="false"
                />


            <!--
            <TriangularBendingFEMForceField name="FEM" bending="true" youngModulus="1.092e6" poissonRatio="0.33" thickness="0.01"/>
            <BezierTriangularBendingFEMForceField name="FEM" youngModulus="1.092e6" poissonRatio="0.33" thickness="0.01" />
            -->

        </Node>

        <Node>
            <OglModel name="Visual" color="red"/>
            <IdentityMapping input="@.." output="@Visual"/>
        </Node>

    </Node>
</Node>
