<?xml version="1.0"?>
<Node name="root" dt="0.05" gravity="0 0 0" showVisualModels="0" showBehaviorModels="1" showCollisionModels="1" showMappings="0" showForceFields="0" showBoundingTree="0">
       <MasterContactSolver/>
        <LCPConstraintSolver tolerance="1e-6" initial_guess="false" build_lcp="true" printLog="false" mu="0.1"/>
        <CollisionPipeline verbose="0" />
        <BruteForceDetection name="N2" />
        <CollisionResponse response="FrictionContact" />
        <LocalMinDistance name="Proximity" alarmDistance="0.0002" contactDistance="0.00005" coneFactor="0.3" angleCone="0.001"/>
        <CollisionGroup />


         <!--Motion control of the implant -->
        <Node name="ImplantMotion">
			<EulerImplicitSolver rayleighMass="1.0" rayleighStiffness="1.0"/>
			<CGLinearSolver iterations="100" tolerance="1e-15" threshold="1e-15"/>
			<MechanicalObject name="ArticulatedObject" template="Vec1d" />
			<UncoupledConstraintCorrection />
            <Node name="6D_DOFs1">
                <MechanicalObject name="6D_Dof" template="Rigid" position="-0.00808106 0.00811328 -0.00228189 0.923597 0.00610244 0.0308571 0.382072  -0.00808106 0.00811328 -0.00228189 0.923597 0.00610244 0.0308571 0.382072   -0.00808106 0.00811328 -0.00228189 0.923597 0.00610244 0.0308571 0.382072"/>
                <UniformMass mass="0.00128 0.000001 [0.0000001 0 0 0 0.0000001 0 0 0 0.0000001]" showAxisSizeFactor="5"/>
                <ArticulatedSystemMapping object1="ArticulatedObject" object2="6D_Dof"/>
            </Node>
            <ArticulatedHierarchyContainer filename="applications/plugins/shells/examples/ISBMS/data/ImplantMotion2.bvh"  />
            <ArticulatedHierarchyBVHController/>
        </Node>

<!--
		<Node name="ImplantFixed">
			<MechanicalObject name="6D_Dof" template="Rigid" position="-0.00808106 0.00811328 -0.00228189 0.923597 0.00610244 0.0308571 0.382072"/>
			<UniformMass mass="0.00128 0.000001 [0.0000001 0 0 0 0.0000001 0 0 0 0.0000001]" showAxisSizeFactor="5"/>
		</Node>

		-->

		<Node name="Rest_position">
            <MeshLoader name="rest_shape" filename="applications/plugins/shells/examples/ISBMS/data/mesh/implant_restPosition.obj"/>
            <Mesh/>
            <Vertex2Frame name="RestVertex2Frame" template="Rigid" vertices="@rest_shape.vertices" normals="@rest_shape.normals" />
        </Node>


    <Node name="Implant">
        <EulerImplicitSolver rayleighMass="1.0" rayleighStiffness="1"/>
        <!--<CGLinearSolver iterations="10000" tolerance="1e-6" threshold="1e-6"/>-->
        <SparseLDLSolver name="SparseLDL Solver" printLog="false" />
        <TriangleSetTopologyContainer name="baseTriangles" filename="applications/plugins/shells/examples/ISBMS/data/mesh/implant_restPosition.obj"/>
        <MechanicalObject name="implant" template="Rigid" debugViewIndices="true" debugViewIndicesScale="0.0001" rest_position="@../Rest_position/RestVertex2Frame.frames"
		position="0.000512879 0.000661019 -0.000554555 0.118404 0.44223 0.462375 -0.759357 0.000517124 0.000837666 -0.000729412 0.297966 -0.380627 -0.852897 0.197248 0.00031659 0.00062241 -0.000753894 0.314308 -0.371918 -0.857829 0.164368 -2.9254e-06 -0.000413218 -0.000161942 -0.155645 0.417155 -0.740267 0.503747 0.000392939 0.000891249 -0.000934388 -0.212511 0.422343 0.807316 -0.353138 -2.75571e-05 -0.000613389 -0.000311622 -0.0638024 -0.473256 0.507626 -0.717129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"
        dx="-0.008017" dy="0.007496" dz="-0.002164" rx="-45" ry="3" rz="88" useMask="false"/>
        <UniformMass mass="0.00001 0.00001 [ 0.00001 0 0 ,  0 0.00001 0 ,  0 0 0.00001 ]" showAxisSizeFactor="0.01" totalmass="0.000001" compute_mapping_inertia="false"/>


        <!-- After 5s of simulation, stiffness and angularStiffness= must be set down to 3e5 and 3e4 respectively, for the implant to be able to relax towards the capsule's centre    -->

		<!-- <RestShapeSpringsForceField points="468" stiffness="3e9" angularStiffness="1e8" external_rest_shape="../ImplantMotion/6D_DOFs1/6D_Dof" external_points="1"/>-->

		<!--<FixedRotationConstraint FixedZRotation="true"/>-->

		<!--<FixedConstraint indices="468 277 283"/> --> <!-- 50 167 48 99 100 101 3 5 6 0 1 2  10 11 12 14 15 17 18 184 183 61 109 62 65 66" />-->

		<RestShapeSpringsForceField points="468" stiffness="3e11" angularStiffness="1e8" external_rest_shape="../ImplantMotion/6D_DOFs1/6D_Dof" external_points="1"/>

        <TriangularBendingFEMForceField name="FEM" bending="true" youngModulus="1.092e6" poissonRatio="0.42" thickness="0.0005"/>
        <LinearSolverConstraintCorrection  />
        <Node>
            <MechanicalObject name="basePointsVec3" template="Vec3d"/>
            <IdentityMapping/>
            <Triangle name="Triangles"  selfCollision="1" bothSide="1" />
            <Line name="Lines"  selfCollision="1"  bothSide="1"  group="2"/>
            <Point name="Points" selfCollision="1"  bothSide="1" group="2"/>
        </Node>


          <!--        <Node name="SubTriangles">-->
          <!--            <TriangleSetTopologyContainer  name="subTriangles"/>-->
          <!--            <TriangleSubdivisionTopologicalMapping object1="baseTriangles" object2="subTriangles" subdivisions="1"/>-->
          <!--            <MechanicalObject  name="subPoints" debugViewIndices="false" debugViewIndicesScale="0.0003"/>-->
          <!--            <BendingPlateMechanicalMapping/>-->
          <!--            <Triangle />-->
          <!--            <Node>-->
          <!--                <OglModel name="Visual" color="red"/>-->
          <!--                <IdentityMapping object1="subPoints" object2="Visual"/>-->
          <!--            </Node>-->
          <!--        </Node>-->

        </Node>


        <Node name="InjectorCollisionModel">
            <Node name="Collision">
                <TriangleSetTopologyContainer name="injector_CM_topo" filename="applications/plugins/shells/examples/ISBMS/data/mesh/injector_CM.obj" />
                <MechanicalObject name="injector_CM" template="Vec3d" scale="0.92" dx="-0.0006" dz="-0.0002"/>
                <Triangle group="3" moving="0" simulated="0"/>
                <Line group="3" moving="0" simulated="0"/>
                <Point group="3" moving="0" simulated="0"/>
            </Node>
        </Node>


        <Node name="Capsule">
            <Node name="Collision">
                <TriangleSetTopologyContainer name="capsule_topo" filename="applications/plugins/shells/examples/ISBMS/data/mesh/capsule.obj" />
                <MechanicalObject name="capsule" template="Vec3d"   />
                <Triangle group="3" moving="0" simulated="0"/>
                <Line group="3" moving="0" simulated="0"/>
                <Point group="3" moving="0" simulated="0"/>
            </Node>
        </Node>


</Node>
