<?xml version="1.0"?>
<Node name="root" dt="0.1" gravity="0 -9.810 0">
	<RequiredPlugin pluginName="shells"/>
	<RequiredPlugin pluginName="SofaMiscForcefieldDev"/>

	<VisualStyle displayFlags="hideCollisionModels hideForceFields hideBehaviorModels showVisualModels showWireframe" />
	<Node name="liver1">
<!-- 		<EulerImplicitSolver/> -->
		<StaticSolver applyIncrementFactor="true" />

<!-- 		<CGLinearSolver iterations="25" tolerance="1e-12" threshold="1e-12"/> -->
<!-- 		<PCGLinearSolver  name="linearsolver" tolerance="1e-12" preconditioners="precond" max_use_by_step="-1" /> -->

		<SparseLDLSolver name="precond"/>

		<MeshVTKLoader name="vloader" filename="Data_Pig210213/mesh15.vtk" flipNormals="false" scale3d="0.001 0.001 0.001"/>
		<MeshObjLoader name="sloader" filename="Data_Pig210213/Supine_Liver_SmDec.obj" scale3d="0.001 0.001 0.001"/>

		<TetrahedronSetTopologyContainer name="Container" src="@vloader"/>
		<TetrahedronSetTopologyModifier name="Modifier"/>
		<TetrahedronSetTopologyAlgorithms name="TopoAlgo"/>
		<TetrahedronSetGeometryAlgorithms name="GeomAlgo"/>
		<MechanicalObject template="Vec3d" name="LiverMO"/>
		<UniformMass totalmass="0.67" />
		<TetrahedronFEMForceField name="FEM" youngModulus="3.5e3" poissonRatio="0.45" method="large" listening="1" />
<!-- 		<MJEDTetrahedralForceField ParameterSet="1206.89655172414  10862.0689655172" materialName="StVenantKirchhoff" considerInversion="0" matrixRegularization="0"/>		 -->

<!-- 		<BoxROI name="box" box="0 0.300 0.300 0.400 0.400 0.500" drawBoxes="1"/> -->
		<BoxROI name="box" box="-0.025 -0.005 0.070 0.045 0.025 0.090" drawBoxes="1"/>
<!-- 		<BoxROI name="box" box="-0.02 0.010 0.085 0.04 0.035 0.100" drawBoxes="1"/> --> -->
		<FixedConstraint  indices="@box.indices"/>
<!-- 		<VTKExporter filename="result_vascularized1.vtk" XMLformat="false" listening="true" edges="0" triangles="0" quads="0" tetras="1" exportAtEnd="true"/>   	 -->

		<Node name="visual2" activated="1">
			<VisualStyle displayFlags="hideCollisionModels hideForceFields hideMappings hideBehaviorModels showVisualModels showWireframe" />
			<Mesh src="@../sloader" name="surface" />
			<OglModel name="LiverVisu" color="1 0  0  1"/>
			<BarycentricMapping input="@../LiverMO" output="@LiverVisu"/>
		</Node>

		<Node name="visual" activated="1">
			<VisualStyle displayFlags="hideCollisionModels hideForceFields hideMappings hideBehaviorModels showVisualModels hideWireframe" />
			<Mesh src="@../sloader" name="surface" />
			<OglModel name="LiverVisu" color="1  0  0  0.4"/>
			<BarycentricMapping input="@../LiverMO" output="@LiverVisu"/>
		</Node>

<!--		<Node name="Capsule" activated="1">
			<TriangleSetTopologyContainer name="topo" />
			<TriangleSetTopologyModifier name="Modifier" />
			<Tetra2TriangleTopologicalMapping input="@../Container" output="@." />
			<Mesh src="@../sloader" name="surface" />
			<CstFEMForceField name="FEM" youngModulus="8e6" poissonRatio="0.45" thickness="20e-6" corotated="true"/>
		</Node>-->


		<MappedBeamToTetraForceField mappedFEM="PortalVein/BeamFEM" mappedMechObject="PortalVein/BeamMO" mapping="PortalVein/BeamTetraMapping" printLog="1"/>

		<Node name="PortalVein" activated="1">
			<VisualStyle displayFlags="hideCollisionModels hideForceFields hideMappings hideBehaviorModels showVisualModels hideWireframe" />
			<include href="Data_Pig210213/RigidMO.xml" scale3d="0.001 0.001 0.001"/>
			<include href="Data_Pig210213/TOPO.xml"/>
			<BeamFEMForceField name="BeamFEM" radius="0.003" radiusInner="0.0029"  youngModulus="0.62e6" poissonRatio="0.40"/>
			<BarycentricMapping name="BeamTetraMapping" input="@../LiverMO" output="@BeamMO"/>

<!--			<Node name="VisuThread">

				<Object type="MechanicalObject" name="Quads" />
				<include href="Objects/QuadSetTopology.xml"/>
				<Object type="Edge2QuadTopologicalMapping" nbPointsOnEachCircle="10" radius="0.003" object1="BeamTopology" object2="Container"/>
				<Object type="TubularMapping" nbPointsOnEachCircle="10" radius="0.002" object1="BeamMO" object2="Quads"/>
				<Node name="VisuOgl" activated="1">
					<Object type="OglModel" name="Visual" color="1 0.0 0.0 0.5" />
					<Object type="IdentityMapping" object1="Quads" object2="Visual"/>
				</Node>
			</Node>-->
		</Node>

	</Node>

	<Node name="liver2" activated="0">
<!-- 		<EulerImplicitSolver/> -->
		<StaticSolver applyIncrementFactor="true"/>

<!-- 		<CGLinearSolver iterations="25" tolerance="1e-12" threshold="1e-12"/> -->
<!-- 		<PCGLinearSolver  name="linearsolver" tolerance="1e-12" preconditioners="precond" max_use_by_step="-1" /> -->

		<SparseLDLSolver name="precond"/>

		<MeshVTKLoader name="vloader" filename="Data_Pig210213/mesh13.vtk" flipNormals="false" scale3d="0.001 0.001 0.001"/>
		<MeshObjLoader name="sloader" filename="Data_Pig210213/Supine_Liver_SmDec.obj" scale3d="0.001 0.001 0.001"/>

		<TetrahedronSetTopologyContainer name="Container" src="@vloader"/>
		<TetrahedronSetTopologyModifier name="Modifier"/>
		<TetrahedronSetTopologyAlgorithms name="TopoAlgo"/>
		<TetrahedronSetGeometryAlgorithms name="GeomAlgo"/>
		<MechanicalObject template="Vec3d" name="LiverMO"/>
		<UniformMass totalmass="0.67" />
		<TetrahedronFEMForceField name="FEM" youngModulus="3.5e3" poissonRatio="0.45" method="large" listening="1" />
<!-- 		<MJEDTetrahedralForceField ParameterSet="1206.89655172414  10862.0689655172" materialName="StVenantKirchhoff" considerInversion="0" matrixRegularization="0"/>		 -->

<!-- 		<BoxROI name="box" box="0 0.300 0.300 0.400 0.400 0.500" drawBoxes="1"/> -->
		<BoxROI name="box" box="-0.025 -0.005 0.070 0.045 0.025 0.090" drawBoxes="1"/>
<!-- 		<BoxROI name="box" box="-0.02 0.010 0.085 0.04 0.035 0.100" drawBoxes="1"/> --> -->
		<FixedConstraint  indices="@box.indices"/>
<!-- 		<VTKExporter filename="result_vascularized1.vtk" XMLformat="false" listening="true" edges="0" triangles="0" quads="0" tetras="1" exportAtEnd="true"/>   	 -->

		<Node name="visual1">
			<VisualStyle displayFlags="hideCollisionModels hideForceFields hideMappings hideBehaviorModels showVisualModels showWireframe" />
			<Mesh src="@../sloader" name="surface" />
			<OglModel name="LiverVisu" color="1 1  0  1"/>
			<BarycentricMapping input="@../LiverMO" output="@LiverVisu"/>
		</Node>

		<Node name="visual2">
			<VisualStyle displayFlags="hideCollisionModels hideForceFields hideMappings hideBehaviorModels showVisualModels hideWireframe" />
			<Mesh src="@../sloader" name="surface" />
			<OglModel name="LiverVisu" color="1 1  0  0.4"/>
			<BarycentricMapping input="@../LiverMO" output="@LiverVisu"/>
		</Node>


		<Node name="Capsule" activated="0">
			<TriangleSetTopologyContainer name="topo" />
			<TriangleSetTopologyModifier name="Modifier" />
			<Tetra2TriangleTopologicalMapping input="@../Container" output="@." />
<!-- 			<Mesh src="@../sloader" name="surface" /> -->
			<CstFEMForceField name="FEM" youngModulus="8e6" poissonRatio="0.45" thickness="20e-6" corotated="true"/>
		</Node>


		<MappedBeamToTetraForceField mappedFEM="PortalVein/BeamFEM" mappedMechObject="PortalVein/BeamMO" mapping="PortalVein/BeamTetraMapping" printLog="1"/>

		<Node name="PortalVein" activated="1">
			<VisualStyle displayFlags="hideCollisionModels hideForceFields hideMappings hideBehaviorModels showVisualModels hideWireframe" />
			<include href="Data_Pig210213/RigidMO.xml" scale3d="0.001 0.001 0.001"/>
			<include href="Data_Pig210213/TOPO.xml"/>
			<BeamFEMForceField name="BeamFEM" radius="0.003" radiusInner="0.0029"  youngModulus="0.62e6" poissonRatio="0.40"/>
			<BarycentricMapping name="BeamTetraMapping" input="@../LiverMO" output="@BeamMO"/>

			<Node name="VisuThread">

				<Object type="MechanicalObject" name="Quads" />
				<include href="Objects/QuadSetTopology.xml"/>
				<Object type="Edge2QuadTopologicalMapping" nbPointsOnEachCircle="10" radius="0.003" object1="BeamTopology" object2="Container"/>
				<Object type="TubularMapping" nbPointsOnEachCircle="10" radius="0.002" object1="BeamMO" object2="Quads"/>
				<Node name="VisuOgl">
					<Object type="OglModel" name="Visual" color="1 1 0 0.5" />
					<Object type="IdentityMapping" object1="Quads" object2="Visual"/>
				</Node>
			</Node>
		</Node>

	</Node>

<!--	<Node name="liver2">
		<StaticSolver applyIncrementFactor="true" verbose="0" />
		<SparseLDLSolver name="precond"/>
		<MeshVTKLoader name="vloader" filename="../../../../Data/PIG_210213_SCANNER_NEEDLES/Meshes/mesh10.vtk" flipNormals="false" scale3d="0.001 0.001 0.001"/>
		<TetrahedronSetTopologyContainer name="Container" src="@vloader"/>
		<TetrahedronSetTopologyModifier name="Modifier"/>
		<TetrahedronSetTopologyAlgorithms name="TopoAlgo"/>
		<TetrahedronSetGeometryAlgorithms name="GeomAlgo"/>
		<MechanicalObject template="Vec3d" name="LiverMO"/>
		<UniformMass totalmass="0.8" />
		<TetrahedronFEMForceField name="FEM" youngModulus="5e3" poissonRatio="0.45" method="large" listening="1" />
		<BoxROI name="box" box="-0.025 -0.005 0.070 0.045 0.025 0.090" drawBoxes="1"/>
		<FixedConstraint  indices="@box.indices"/>
		<Node name="visual2">
			<OglModel name="LiverVisu" fileMesh="../../../../Data/PIG_210213_SCANNER_NEEDLES/Meshes/mesh10.obj" color="1 1  0  1" scale3d="0.001 0.001 0.001"/>
			<BarycentricMapping input="@../LiverMO" output="@LiverVisu"/>
		</Node>
	</Node>-->


<!--	<Node name="liver2">
		<VisualStyle displayFlags="hideCollisionModels hideForceFields hideBehaviorModels showVisualModels showWireframe" />
		<StaticSolver applyIncrementFactor="false"/>
		<CGLinearSolver iterations="30" tolerance="1e-12" threshold="1e-12"/>
		<MeshVTKLoader name="vloader" filename="../Data/Mesh1/liver-volume-500-ordered.vtu" flipNormals="false" />
		<MeshObjLoader name="loader" filename="../Data/Mesh1/liverM.obj" flipNormals="false" />
		<TetrahedronSetTopologyContainer name="Container" src="@vloader"/>
		<TetrahedronSetTopologyModifier name="Modifier"/>
		<TetrahedronSetTopologyAlgorithms name="TopoAlgo"/>
		<TetrahedronSetGeometryAlgorithms name="GeomAlgo"/>
		<MechanicalObject template="Vec3d" name="LiverMO" scale3d="0.001 0.001 0.001" translation="0.00 0.00 0.00" />
		<UniformMass totalmass="1.5" />
		<TetrahedronFEMForceField name="FEM" youngModulus="3.5e3" poissonRatio="0.45" method="large" listening="1" />

		<BoxROI name="box" box="0.20 0.24 0.36 0.25 0.28 0.42" drawBoxes="1"/>
		<FixedConstraint  indices="@box.indices"/>
 		<VTKExporter filename="result_vascularized2.vtk" XMLformat="false" listening="true" edges="0" triangles="0" quads="0" tetras="1" exportAtEnd="true"/>

		<Node name="visual">
			<VisualStyle displayFlags="hideCollisionModels hideForceFields hideMappings hideBehaviorModels showVisualModels showWireframe" />
			<Mesh src="@../loader" name="surface" />
			<OglModel name="LiverVisu" fileMesh="../Data/Mesh1/liverM.obj" translation="0.0 0 0" color="0.0 1.0 0.0 1.0"/>
			<BarycentricMapping input="@../LiverMO" output="@LiverVisu"/>
		</Node>

		<Node name="visual">
			<VisualStyle displayFlags="hideCollisionModels hideForceFields hideMappings hideBehaviorModels showVisualModels hideWireframe" />
			<Mesh src="@../loader" name="surface" />
			<OglModel name="LiverVisu" fileMesh="../Data/Mesh1/liverM.obj" color="0.0 1.0 0.0 0.0"/>
			<BarycentricMapping input="@../LiverMO" output="@LiverVisu"/>
		</Node>
	</Node>-->


</Node>
